*Heading
** Job name: 1element_ve_creep_test Model name: 1element
** Generated by: Abaqus/CAE 2020
*Preprint, echo=NO, model=NO, history=NO, contact=NO
**
** PARTS
**
*Part, name=PART-1
*Node
      1,           0.,           0.,           0.
      2,           1.,           0.,           0.
      3,           1.,           1.,           0.
      4,           0.,           1.,           0.
      5,           0.,           0.,           1.
      6,           1.,           0.,           1.
      7,           1.,           1.,           1.
      8,           0.,           1.,           1.
*Element, type=C3D8
1, 1, 2, 3, 4, 5, 6, 7, 8
*Elset, elset=ELEMENT1
 1,
** Section: Section-1-ELEMENT1
*Solid Section, elset=ELEMENT1, material=U1
1.,
*End Part
**
**
** ASSEMBLY
**
*Assembly, name=Assembly
**
*Instance, name=PART-1-1, part=PART-1
*End Instance
**
*Nset, nset=BOTTOM, instance=PART-1-1
 1, 2, 5, 6
*Nset, nset=Set-11, instance=PART-1-1
 3, 4, 7, 8
*Nset, nset=Set-12, instance=PART-1-1
 3, 4, 7, 8
*Nset, nset=TOP, instance=PART-1-1
 3, 4, 7, 8
*Nset, nset=_M5, internal, instance=PART-1-1
 2,
*Nset, nset=_M6, internal, instance=PART-1-1
 6,
*Nset, nset=_M7, internal, instance=PART-1-1
 1,
*Nset, nset=_M8, internal, instance=PART-1-1
 5,
*Nset, nset=_M9, internal, instance=PART-1-1
 2,
*Nset, nset=_M10, internal, instance=PART-1-1
 6,
*Nset, nset=_M11, internal, instance=PART-1-1
 1,
*Nset, nset=_M12, internal, instance=PART-1-1
 5,
*End Assembly
**
** MATERIALS
**
*Material, name=U1
*Depvar
     13,
*User Material, constants=5
175000.0, 80769.0, 200.0, 400.0, 10.0
** ----------------------------------------------------------------
**
** STEP: Step-1
**
*Step, name=Step-1, nlgeom=NO, inc=10000
*Static
0.01, 2.0, 0.01, 0.01
**
** BOUNDARY CONDITIONS
**
** Name: Disp-BC-2 Type: Displacement/Rotation
*Boundary
_M5, 2, 2
_M5, 3, 3
** Name: Disp-BC-3 Type: Displacement/Rotation
*Boundary
_M6, 2, 2
** Name: Disp-BC-4 Type: Displacement/Rotation
*Boundary
_M7, 1, 1
_M7, 2, 2
_M7, 3, 3
** Name: Disp-BC-5 Type: Displacement/Rotation
*Boundary
_M8, 1, 1
_M8, 2, 2
**
** LOADS
**
** Name: Load-1   Type: Concentrated force
*Cload
Set-11, 2, 20.
**
** OUTPUT REQUESTS
**
*Restart, write, frequency=0
**
** FIELD OUTPUT: F-Output-2
**
*Output, field
*Element Output, elset=PART-1-1.ELEMENT1, directions=YES
SDV,
**
** FIELD OUTPUT: F-Output-1
**
*Output, field, variable=PRESELECT
*Output, history, frequency=0
*End Step
**
** STEP: Step-2
**
*Step, name=Step-2, nlgeom=NO, inc=10000
*Static
0.01, 2.0, 0.01, 0.01
**
** BOUNDARY CONDITIONS
**
** Name: Disp-BC-2 Type: Displacement/Rotation
*Boundary, op=NEW
** Name: Disp-BC-3 Type: Displacement/Rotation
*Boundary, op=NEW
** Name: Disp-BC-4 Type: Displacement/Rotation
*Boundary, op=NEW
** Name: Disp-BC-5 Type: Displacement/Rotation
*Boundary, op=NEW
** Name: Disp-BC-7 Type: Displacement/Rotation
*Boundary, op=NEW
_M9, 2, 2
_M9, 3, 3
** Name: Disp-BC-8 Type: Displacement/Rotation
*Boundary, op=NEW
_M10, 2, 2
** Name: Disp-BC-9 Type: Displacement/Rotation
*Boundary, op=NEW
_M11, 1, 1
_M11, 2, 2
_M11, 3, 3
** Name: Disp-BC-10 Type: Displacement/Rotation
*Boundary, op=NEW
_M12, 1, 1
_M12, 2, 2
**
** LOADS
**
** Name: Load-2   Type: Concentrated force
*Cload
Set-12, 2, -20.0
**
** OUTPUT REQUESTS
**
*Restart, write, frequency=0
**
** FIELD OUTPUT: F-Output-4
**
*Output, field
*Element Output, elset=PART-1-1.ELEMENT1, directions=YES
SDV,
**
** FIELD OUTPUT: F-Output-3
**
*Output, field, variable=PRESELECT
*Output, history, frequency=0
*End Step
